// SBML level 3 version 2

model grn_model()

  // Compartments:
  compartment default_compartment = 1;

  // Species:
  species tyrB in default_compartment = 1;
  species tyrR in default_compartment = 1;
  species yaiA in default_compartment = 1;
  species folA in default_compartment = 1;
  species mtr in default_compartment = 1;
  species tyrP in default_compartment = 1;
  species tyrA in default_compartment = 1;
  species aroL in default_compartment = 1;
  species aroM in default_compartment = 1;
  species aroG in default_compartment = 1;
  species aroP in default_compartment = 1;
  species aroF in default_compartment = 1;

  // Parameters:
  n_tyrR_to_aroF = 1;
  beta_tyrR_to_aroF = 1;
  K_tyrR_to_aroF = 1;
  n_tyrR_to_aroG = 1;
  beta_tyrR_to_aroG = 1;
  K_tyrR_to_aroG = 1;
  n_tyrR_to_aroL = 1;
  beta_tyrR_to_aroL = 1;
  K_tyrR_to_aroL = 1;
  n_tyrR_to_aroM = 1;
  beta_tyrR_to_aroM = 1;
  K_tyrR_to_aroM = 1;
  n_tyrR_to_aroP = 1;
  beta_tyrR_to_aroP = 1;
  K_tyrR_to_aroP = 1;
  n_tyrR_to_folA = 1;
  K_tyrR_to_folA = 1;
  beta_tyrR_to_folA = 1;
  n_tyrR_to_mtr = 1;
  K_tyrR_to_mtr = 1;
  beta_tyrR_to_mtr = 1;
  n_tyrR_to_tyrA = 1;
  beta_tyrR_to_tyrA = 1;
  K_tyrR_to_tyrA = 1;
  n_tyrR_to_tyrB = 1;
  beta_tyrR_to_tyrB = 1;
  K_tyrR_to_tyrB = 1;
  n_tyrR_to_tyrP = 1;
  K_tyrR_to_tyrP = 1;
  beta_tyrR_to_tyrP = 1;
  n_tyrR_to_yaiA = 1;
  beta_tyrR_to_yaiA = 1;
  K_tyrR_to_yaiA = 1;

  // Reactions:
  J_tyrR_to_aroF: tyrR => aroF; 1/(1 + tyrR^n_tyrR_to_aroF/1);
  J_tyrR_to_aroG: tyrR => aroG; 1/(1 + tyrR^n_tyrR_to_aroG/1);
  J_tyrR_to_aroL: tyrR => aroL; 1/(1 + tyrR^n_tyrR_to_aroL/1);
  J_tyrR_to_aroM: tyrR => aroM; 1/(1 + tyrR^n_tyrR_to_aroM/1);
  J_tyrR_to_aroP: tyrR => aroP; 1/(1 + tyrR^n_tyrR_to_aroP/1);
  J_tyrR_to_folA: tyrR => folA; 1*tyrR^n_tyrR_to_folA/(K_tyrR_to_folA^n_tyrR_to_folA + tyrR^n_tyrR_to_folA);
  J_tyrR_to_mtr: tyrR => mtr; 1*tyrR^n_tyrR_to_mtr/(K_tyrR_to_mtr^n_tyrR_to_mtr + tyrR^n_tyrR_to_mtr);
  J_tyrR_to_tyrA: tyrR => tyrA; 1/(1 + tyrR^n_tyrR_to_tyrA/1);
  J_tyrR_to_tyrB: tyrR => tyrB; 1/(1 + tyrR^n_tyrR_to_tyrB/1);
  J_tyrR_to_tyrP: tyrR => tyrP; 1*tyrR^n_tyrR_to_tyrP/(K_tyrR_to_tyrP^n_tyrR_to_tyrP + tyrR^n_tyrR_to_tyrP);
  J_tyrR_to_yaiA: tyrR => yaiA; 1/(1 + tyrR^n_tyrR_to_yaiA/1);
end
