// SBML level 3 version 2

model grn_model()

  // Compartments:
  compartment default_compartment = 1;

  // Species:
  species $GeneA in default_compartment = 1;
  species GeneB in default_compartment = 0;
  species GeneC in default_compartment = 0;

  // Parameters:
  beta_GeneA_to_GeneB = 1;
  n_GeneA_to_GeneB = 1;
  K_GeneA_to_GeneB = 1;
  beta_GeneA_to_GeneC = 1;
  n_GeneA_to_GeneC = 1;
  K_GeneA_to_GeneC = 1;

  // Reactions:
  J_GeneA_to_GeneB: $GeneA => GeneB; beta_GeneA_to_GeneB*GeneA^n_GeneA_to_GeneB/(K_GeneA_to_GeneB^n_GeneA_to_GeneB + GeneA^n_GeneA_to_GeneB);
  J_GeneA_to_GeneC: $GeneA => GeneC; beta_GeneA_to_GeneC/(1 + GeneA^n_GeneA_to_GeneC/K_GeneA_to_GeneC^n_GeneA_to_GeneC);
end
