// SBML level 3 version 2

model grn_model()

  // Compartments:
  compartment default_compartment = 1;

  // Species:
  species aroM in default_compartment = 1;
  species aroP in default_compartment = 1;
  species aroG in default_compartment = 1;
  species folA in default_compartment = 1;
  species tyrB in default_compartment = 1;
  species aroL in default_compartment = 1;
  species mtr in default_compartment = 1;
  species yaiA in default_compartment = 1;
  species tyrA in default_compartment = 1;
  species tyrR in default_compartment = 1;
  species tyrP in default_compartment = 1;
  species aroF in default_compartment = 1;

  // Parameters:
  beta_tyrR_to_aroF = 1;
  K_tyrR_to_aroF = 1e-6;
  delta_aroF = 0.1;
  noise = 0;
  beta_tyrR_to_aroG = 1;
  K_tyrR_to_aroG = 1e-6;
  delta_aroG = 0.1;
  beta_tyrR_to_aroL = 1;
  K_tyrR_to_aroL = 1e-6;
  delta_aroL = 0.1;
  beta_tyrR_to_aroM = 1;
  K_tyrR_to_aroM = 1e-6;
  delta_aroM = 0.1;
  beta_tyrR_to_aroP = 1;
  K_tyrR_to_aroP = 1e-6;
  delta_aroP = 0.1;
  beta_tyrR_to_folA = 1;
  K_tyrR_to_folA = 1e-6;
  delta_folA = 0.1;
  beta_tyrR_to_mtr = 1;
  K_tyrR_to_mtr = 1e-6;
  delta_mtr = 0.1;
  beta_tyrR_to_tyrA = 1;
  K_tyrR_to_tyrA = 1e-6;
  delta_tyrA = 0.1;
  beta_tyrR_to_tyrB = 1;
  K_tyrR_to_tyrB = 1e-6;
  delta_tyrB = 0.1;
  beta_tyrR_to_tyrP = 1;
  K_tyrR_to_tyrP = 1e-6;
  delta_tyrP = 0.1;
  beta_tyrR_to_yaiA = 1;
  K_tyrR_to_yaiA = 1e-6;
  delta_yaiA = 0.1;

  // Reactions:
  J_tyrR_to_aroF: tyrR => aroF; 1/(1 + 1e-6*tyrR) - 0.1*aroF + 0;
  J_tyrR_to_aroG: tyrR => aroG; 1/(1 + 1e-6*tyrR) - 0.1*aroG + 0;
  J_tyrR_to_aroL: tyrR => aroL; 1/(1 + 1e-6*tyrR) - 0.1*aroL + 0;
  J_tyrR_to_aroM: tyrR => aroM; 1/(1 + 1e-6*tyrR) - 0.1*aroM + 0;
  J_tyrR_to_aroP: tyrR => aroP; 1/(1 + 1e-6*tyrR) - 0.1*aroP + 0;
  J_tyrR_to_folA: tyrR => folA; 1*tyrR - 0.1*folA + 0;
  J_tyrR_to_mtr: tyrR => mtr; 1*tyrR - 0.1*mtr + 0;
  J_tyrR_to_tyrA: tyrR => tyrA; 1/(1 + 1e-6*tyrR) - 0.1*tyrA + 0;
  J_tyrR_to_tyrB: tyrR => tyrB; 1/(1 + 1e-6*tyrR) - 0.1*tyrB + 0;
  J_tyrR_to_tyrP: tyrR => tyrP; 1*tyrR - 0.1*tyrP + 0;
  J_tyrR_to_yaiA: tyrR => yaiA; 1/(1 + 1e-6*tyrR) - 0.1*yaiA + 0;
end
