// SBML level 3 version 1

model grn_model()
  // Gene Regulatory Network Model
  // model units - substance: mole, time: second, extent: mole

  // Compartments:
  compartment compartment = 1 litre;

  // Species:
  species GeneA in compartment = 0;
  species ProteinB in compartment = 0;
  species GeneC in compartment = 0;

  // Reactions:
  reaction_GeneA_to_ProteinB: GeneA => ProteinB; k_GeneA_to_ProteinB*GeneA;
    k_GeneA_to_ProteinB = 1 per_second;
  reaction_ProteinB_to_GeneC: ProteinB => GeneC; k_ProteinB_to_GeneC/(1 + ProteinB);
    k_ProteinB_to_GeneC = 1 per_second;

  // Unit definitions:
  unit per_second = 1 / second;
end
